<?xml version="1.0"?>
<!-- Generated by Aero-Matic v 1.1

specs:
prop-pitch - -14.5 reversed - +79 feathered


     Inputs:
                horsepower: 1279
                     pitch: variable
            max engine rpm: 1700
        prop diameter (ft): 9.12118

     Outputs:
              max prop rpm: 2057.08
                gear ratio:    0.83
                       Cp0: 0.116270
                       Ct0: 0.270908
       static thrust (lbs): 5241.29
-->

<propeller name="prop">
 <ixx> 4.25 </ixx>
  <diameter unit="IN"> 141.7 </diameter>
  <numblades> 6 </numblades>
  <gearratio> 16.4 </gearratio>
  <reversepitch> -15.1 </reversepitch>
  <minpitch> 15.5</minpitch>
  <maxpitch> 77 </maxpitch>
  <minrpm> 853 </minrpm>
  <maxrpm> 1300 </maxrpm>
  <constspeed> 1 </constspeed>
  <p_factor> 1 </p_factor>
 <ct_factor> 1.4 </ct_factor>
  <cp_factor>1.0</cp_factor>

 <!-- thrust coefficient as a function of advance ratio and blade angle -->
  <table name="C_THRUST" type="internal">
      <tableData>
                        -10        0               15        25             35         45        55               65       77
      -0.2      -0.1321    0.0744    0.2707    0.3316    0.3654    0.3857    0.3554    0.3045   0.0000
       0.0      -0.1962    0.0000    0.2707    0.3316    0.3654    0.3892    0.3638    0.3045   0.0000
       0.2      -0.2201   -0.0677    0.2336    0.3248    0.3603    0.3892    0.3638    0.3045   0.0000
       0.4      -0.2201   -0.1573    0.1759    0.3216    0.3535    0.3857    0.3638    0.3045   0.0000
       0.6      -0.2201   -0.2201    0.0931    0.2894    0.3384    0.3757    0.3587    0.3045   0.0000
       0.8      -0.2201   -0.2201    0.0051    0.2165    0.3283    0.3622    0.3587    0.3045   0.0000
       1.0      -0.2201   -0.2201   -0.0880    0.1321    0.3148    0.3435    0.3554    0.3045   0.0000
       1.2      -0.2201   -0.2201   -0.1811    0.0406    0.2588    0.3316    0.3554    0.3045   0.0000
       1.4      -0.2201   -0.2201   -0.2201   -0.0593    0.1862    0.3264    0.3486    0.3045   0.0000
       1.6      -0.2201   -0.2201   -0.2201   -0.1505    0.1015    0.3148    0.3419    0.3045   0.0000
       1.8      -0.2201   -0.2201   -0.2201   -0.2201    0.0171    0.2707    0.3316    0.3045   0.0000
       2.0      -0.2201   -0.2201   -0.2201   -0.2201   -0.0677    0.2114    0.3302    0.3045   0.0000
       2.2      -0.2201   -0.2201   -0.2201   -0.2201   -0.1524    0.1524    0.3248    0.3045   0.0000
       2.4      -0.2201   -0.2201   -0.2201   -0.2201   -0.2201    0.0812    0.2653    0.3045   0.0000
       2.6      -0.2201   -0.2201   -0.2201   -0.2201   -0.2201    0.0103    0.1678    0.2707   0.0000
       2.8      -0.2201   -0.2201   -0.2201   -0.2201   -0.2201   -0.0609    0.1099    0.2201   0.0000
       3.0      -0.2201   -0.2201   -0.2201   -0.2201   -0.2201   -0.1321    0.0577    0.1692   0.0000
       3.2      -0.2201   -0.2201   -0.2201   -0.2201   -0.2201   -0.2030    0.0051    0.1186   0.0000
       3.4      -0.2201   -0.2201   -0.2201   -0.2201   -0.2201   -0.2201   -0.0474    0.0677   0.0000
       3.6      -0.2201   -0.2201   -0.2201   -0.2201   -0.2201   -0.2201   -0.0999    0.0171   0.0000
       3.8      -0.2201   -0.2201   -0.2201   -0.2201   -0.2201   -0.2201   -0.1524   -0.0338   0.0000
       4.0      -0.2201   -0.2201   -0.2201   -0.2201   -0.2201   -0.2201   -0.2046   -0.0847   0.0000
       6.0      -0.2201   -0.2201   -0.2201   -0.2201   -0.2201   -0.2201   -0.2201   -0.2201   0.0000
      </tableData>
  </table>

 <!-- power coefficient as a function of advance ratio and blade angle -->
  <table name="C_POWER" type="internal">
     <tableData>
               -10        0        15        25        35        45        55        65       77
      -0.2      0.0194   0.0387    0.1356    0.3079    0.5309    0.7551    0.8713    0.9642   0.9642
       0.0      0.0775   0.0194    0.1162    0.2869    0.5077    0.7551    0.8748    0.9642   0.9642
       0.2      0.1104   0.0310    0.1123    0.2672    0.4856    0.7551    0.8748    0.9642   0.9642
       0.4      0.1487   0.0677    0.0968    0.2463    0.4612    0.7551    0.8748    0.9642   0.9642
       0.6      0.1824   0.1026    0.0639    0.2289    0.4322    0.7400    0.8713    0.9642   0.9642
       0.8      0.2149   0.1374    0.0194    0.1940    0.4066    0.7063    0.8713    0.9642   0.9642
       1.0      0.2474   0.1708    0.0194    0.1359    0.3834    0.6703    0.8678    0.9642   0.9642
       1.2      0.2811   0.1365   -0.0639    0.0523    0.3392    0.6424    0.8620    0.9642   0.9642
       1.4      0.3137   0.2358   -0.0964   -0.0387    0.2614    0.6331    0.8515    0.9642   0.9642
       1.6      0.3462   0.2695   -0.1127   -0.1162    0.1650    0.6157    0.8330    0.9294   0.9642
       1.8      0.3799   0.3020   -0.1162   -0.1940    0.0484    0.5460    0.8074    0.9096   0.9642
       2.0      0.4124   0.3346   -0.1487   -0.2707   -0.0581    0.4647    0.7691    0.8910   0.9642
       2.2      0.4449   0.3683   -0.1824   -0.3485   -0.1743    0.3776    0.7458    0.8515   0.9642
       2.4      0.4786   0.4008   -0.2149   -0.4264   -0.2904    0.2695    0.7238    0.8330   0.9642
       2.6      0.5112   0.4333   -0.2474   -0.5030   -0.3683    0.1127    0.7063    0.8039   0.9642
       2.8      0.5437   0.4670   -0.2811   -0.5809   -0.4415   -0.0383    0.6912    0.7935   0.9642
       3.0      0.5774   0.4995   -0.3137   -0.6587   -0.5228   -0.1743    0.6680    0.7935   0.9642
       3.2      0.6099   0.5321   -0.3462   -0.7354   -0.6006   -0.3102    0.6250    0.7749   0.9642
       3.4      0.6424   0.5658   -0.3799   -0.8132   -0.6773   -0.4449    0.4844    0.7551   0.9642
       3.6      0.6761   0.5983   -0.4124   -0.8910   -0.7551   -0.5809    0.3404    0.7354   0.9642
       3.8      0.7087   0.6308   -0.4449   -0.9642   -0.8330   -0.7168    0.1894    0.7121   0.9642
       4.0      0.7412   0.6645   -0.4786   -0.9642   -0.9642   -0.8515    0.0383    0.6587   0.9642
       6.0      0.9642   0.9642   -0.9642   -0.9642   -0.9642   -0.9642   -0.9642   -0.5809   0.9642
     </tableData>
  </table>

<!-- thrust effects of helical tip Mach -->
<table name="CT_MACH" type="internal">
  <tableData>
    0.85   1.0
    1.05   0.8
  </tableData>
</table>

<!-- power-required effects of helical tip Mach -->
<table name="CP_MACH" type="internal">
  <tableData>
    0.85   1.0
    1.05   1.8
    2.00   1.4
  </tableData>
</table>

</propeller>
